<?xml version="1.0" ?>

<fdm_config release="Alpha" version="3.0">

    <metrics file="Metrics.xml"/>

    <mass_balance file="Mass.xml"/>

    <ground_reactions file="Gear.xml"/>

    <propulsion file="Propulsion.xml"/>

    <aerodynamics file="Aero.xml"/>

    <system file="Effectors.xml"/>

<!--    <flight_control file="FlightControl.xml"/>-->

    <system file="SensorImu.xml"/>
    <system file="SensorBaro.xml"/>
    <system file="SensorGps.xml"/>

</fdm_config>
